// COMSOL Multiphysics 6.2.0.339 model "40lamina_wavy.mph"
// Outline of the model tree

Couplings
  maxop1: Maximum on all domains

Coordinate systems
  sys2: Rotated "Rotated System 2"

Common definitions
  mpf1: ParticipationFactors

Geometry
  geom1 "Geometry 1" (3D, length unit m)
    wp1: WorkPlane | unite = on
      pc1: ParametricCurve | pos = {-0.25, 0}; coord = {0.05*sin(2*pi*s/0.2), s}
      arr1: Array | input = pc1; size = {30*2, 1}; fullsize = {30*2, 1}; displ = {0.05/2, 0}
      sq1: Square
      par1: Partition "Partition Objects 1" | input = sq1; tool = arr1
      csol1: ConvertToSolid | input = par1
    ext1: Extrude | workplane = wp1; input = wp1; distance = 0.01
    fin: Finalize "Form Union"

Materials
  mat1: Common "Barium Titanate" on domains 1, 4, 6, 8, 10, 12, 15, 17, 19, 22, 24, 26, 28, 30, 32, 34, 36, 38, 40, 42, 44, 46, 48, 50, 52, 54, 56, 57, 59-61, 63, 65-70, 72-74, 76
    def "Basic"
      relpermittivity = diag{1976.8, 1976.8, 111.7}
      density = 5800[kg/m^3]
    StrainCharge "Strain-charge form"
      sE = {8.05e-012[1/Pa], -2.35e-012[1/Pa], -5.24e-012[1/Pa], 0[1/Pa], 0[1/Pa], 0[1/Pa], -2.35e-012[1/Pa], 8.05e-012[1/Pa], -5.24e-012[1/Pa], 0[1/Pa], 0[1/Pa], 0[1/Pa], -5.24e-012[1/Pa], -5.24e-012[1/Pa], 1.57e-011[1/Pa], 0[1/Pa], 0[1/Pa], 0[1/Pa], 0[1/Pa], 0[1/Pa], 0[1/Pa], 1.84e-011[1/Pa], 0[1/Pa], 0[1/Pa], 0[1/Pa], 0[1/Pa], 0[1/Pa], 0[1/Pa], 1.84e-011[1/Pa], 0[1/Pa], 0[1/Pa], 0[1/Pa], 0[1/Pa], 0[1/Pa], 0[1/Pa], 8.84e-012[1/Pa]}
      dET = {0[C/N], 0[C/N], -3.45e-011[C/N], 0[C/N], 0[C/N], -3.45e-011[C/N], 0[C/N], 0[C/N], 8.56e-011[C/N], 0[C/N], 3.92e-010[C/N], 0[C/N], 3.92e-010[C/N], 0[C/N], 0[C/N], 0[C/N], 0[C/N], 0[C/N]}
      epsilonrT = diag{2920, 2920, 168}
      eta_sE = {0, 0, 0, 0, 0, 0, 0, 0, 0, 0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}
      eta_dET = {0, 0, 0, 0, 0, 0, 0, 0, 0, 0, 0, 0, 0, 0, 0, 0, 0, 0}
      eta_epsilonT = 0
    StressCharge "Stress-charge form"
      cE = {166[GPa], 77[GPa], 78[GPa], 0[Pa], 0[Pa], 0[Pa], 77[GPa], 166[GPa], 78[GPa], 0[Pa], 0[Pa], 0[Pa], 78[GPa], 78[GPa], 162[GPa], 0[Pa], 0[Pa], 0[Pa], 0[Pa], 0[Pa], 0[Pa], 43[GPa], 0[Pa], 0[Pa], 0[Pa], 0[Pa], 0[Pa], 0[Pa], 43[GPa], 0[Pa], 0[Pa], 0[Pa], 0[Pa], 0[Pa], 0[Pa], 1/2*(166-77)[GPa]}
      eES = {0[C/m^2], 0[C/m^2], -4.4[C/m^2], 0[C/m^2], 0[C/m^2], -4.4[C/m^2], 0[C/m^2], 0[C/m^2], 18.6[C/m^2], 0[C/m^2], 11.6[C/m^2], 0[C/m^2], 11.6[C/m^2], 0[C/m^2], 0[C/m^2], 0[C/m^2], 0[C/m^2], 0[C/m^2]}
      epsilonrS = diag{1.2537e+03, 1.2537e+03, 1.4231e+03}
      eta_cE = {0, 0, 0, 0, 0, 0, 0, 0, 0, 0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}
      eta_eES = {0, 0, 0, 0, 0, 0, 0, 0, 0, 0, 0, 0, 0, 0, 0, 0, 0, 0}
      eta_epsilonS = 0
  mat2: Common "Lithium Niobate" on domains 2, 3, 5, 7, 9, 11, 13, 14, 16, 18, 20, 21, 23, 25, 27, 29, 31, 33, 35, 37, 39, 41, 43, 45, 47, 49, 51, 53, 55, 57, 58, 62, 64, 66, 69, 71, 73, 75
    def "Basic"
      relpermittivity = diag{43.6, 43.6, 29.16}
      density = 5300[kg/m^3]
    StrainCharge "Strain-charge form"
      sE = {5.78e-012[1/Pa], -1.01e-012[1/Pa], -1.47e-012[1/Pa], -1.02e-012[1/Pa], 0[1/Pa], 0[1/Pa], -1.01e-012[1/Pa], 5.78e-012[1/Pa], -1.47e-012[1/Pa], 1.02e-012[1/Pa], 0[1/Pa], 0[1/Pa], -1.47e-012[1/Pa], -1.47e-012[1/Pa], 5.02e-012[1/Pa], 0[1/Pa], 0[1/Pa], 0[1/Pa], -1.02e-012[1/Pa], 1.02e-012[1/Pa], 0[1/Pa], 1.7e-011[1/Pa], 0[1/Pa], 0[1/Pa], 0[1/Pa], 0[1/Pa], 0[1/Pa], 0[1/Pa], 1.7e-011[1/Pa], -2.04e-012[1/Pa], 0[1/Pa], 0[1/Pa], 0[1/Pa], 0[1/Pa], -2.04e-012[1/Pa], 1.36e-011[1/Pa]}
      dET = {0[C/N], -2.1e-011[C/N], -1e-012[C/N], 0[C/N], 2.1e-011[C/N], -1e-012[C/N], 0[C/N], 0[C/N], 6e-012[C/N], 0[C/N], 6.8e-011[C/N], 0[C/N], 6.8e-011[C/N], 0[C/N], 0[C/N], -4.2e-011[C/N], 0[C/N], 0[C/N]}
      epsilonrT = diag{84, 84, 30}
      eta_sE = {0, 0, 0, 0, 0, 0, 0, 0, 0, 0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}
      eta_dET = {0, 0, 0, 0, 0, 0, 0, 0, 0, 0, 0, 0, 0, 0, 0, 0, 0, 0}
      eta_epsilonT = 0
    StressCharge "Stress-charge form"
      cE = {286[GPa], 173[GPa], 170[GPa], 0, 0[Pa], 0[Pa], 173[GPa], 286[GPa], 170[GPa], 0, 0[Pa], 0[Pa], 170[GPa], 170[GPa], 269.5[GPa], 0[Pa], 0[Pa], 0[Pa], 0, 0, 0[Pa], 45.3[GPa], 0[Pa], 0[Pa], 0[Pa], 0[Pa], 0[Pa], 0[Pa], 45.3[GPa], 0, 0[Pa], 0[Pa], 0[Pa], 0[Pa], 0, 1/2*(286-173)[GPa]}
      eES = {0[C/m^2], 0, 0, 0[C/m^2], 0, 0, 0[C/m^2], 0[C/m^2], 0, 0[C/m^2], 0, 0[C/m^2], 0, 0[C/m^2], 0[C/m^2], 0, 0[C/m^2], 0[C/m^2]}
      epsilonrS = diag{9.0355, 9.0355, 10.5037}
      eta_cE = {0, 0, 0, 0, 0, 0, 0, 0, 0, 0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}
      eta_eES = {0, 0, 0, 0, 0, 0, 0, 0, 0, 0, 0, 0, 0, 0, 0, 0, 0, 0}
      eta_epsilonS = 0

Physics
  solid: SolidMechanics on all domains
    dependent variable w = {u, v, w}
    ShapeProperty.order_displacement = 1
    StructuralTransientBehavior.StructuralTransientBehavior = IncludeInertia
    cref.cref = solid.cs
    lemm1: LinearElasticModel "Linear Elastic Material 1" (default) | SolidModel = Orthotropic; TransverseIsotropic = 1
    free1: Free (default)
    init1: init "Initial Values 1" (default)
    pzm1: PiezoelectricMaterialModel "Piezoelectric Material 1" on all domains | coordinateSystem = sys2
    fix1: Fixed "Fixed Constraint 1" on boundaries 1, 3, 8, 12-14, 18, 22, 26, 30, 34, 38-44, 48, 52, 56, 60-63, 67, 71, 75-81, 85, 89, 93, 97-102, 106-110, 112, 115, 117, 120, 122, 125, 127, 130, 132, 135, 137, 140, 142, 145, 147, 150, 152, 155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
    pc1: PeriodicCondition on boundaries 4-7, 10, 11, 16, 17, 20, 21, 24, 25, 28, 29, 32, 33, 36, 37, 46, 47, 50, 51, 54, 55, 58, 59, 65, 66, 69, 70, 73, 74, 83, 84, 87, 88, 91, 92, 95, 96, 104, 105, 113, 114, 118, 119, 123, 124, 128, 129, 133, 134, 138, 139, 143, 144, 148, 149, 153, 154, 158, 159, 163, 164, 168, 169, 173, 174, 178, 179, 183, 184, 188, 189, 193, 194, 198, 199, 203, 204, 208, 209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
      destinationDomains: boundaries 6, 7, 11, 17, 21, 25, 29, 33, 37, 47, 51, 55, 59, 66, 70, 74, 84, 88, 92, 96, 105, 114, 119, 124, 129, 134, 139, 144, 149, 154, 159, 164, 169, 174, 179, 184, 189, 194, 199, 204, 209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
  es: Electrostatics on all domains
    dependent variable V
    ShapeProperty.order_electricpotential = 1
    ccn1: ChargeConservation (default)
    zc1: ZeroCharge (default)
    init1: init "Initial Values 1" (default)
    ccnp1: ChargeConservationPiezo "Charge Conservation, Piezoelectric 1" on all domains
    gnd1: Ground on boundaries 1, 3, 8, 12-14, 18, 22, 26, 30, 34, 38-44, 48, 52, 56, 60-63, 67, 71, 75-81, 85, 89, 93, 97-102, 106-110, 112, 115, 117, 120, 122, 125, 127, 130, 132, 135, 137, 140, 142, 145, 147, 150, 152, 155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

Multiphysics
  pze1: PiezoelectricEffect "Piezoelectricity 1" on all domains | Solid_physics = solid; Electrostatics_physics = es

Mesh
  mesh1 "Mesh 1" (physics-controlled)
    size: MeshSizeDefault | hauto = 1

Studies
  std1 "Study 1"
    eig: Eigenfrequency | neigs = 40; shift = 1[Hz]; chkeigregion = on; conrad = 1; conradynhm = 1; linpsolnum = auto

Solver configurations
  sol1 "Solution 1" (study std1)
    v1: Variables "Dependent Variables 1"
    e1: Eigenvalue "Eigenvalue Solver 1"
      rtol = 0.001
      storelinpoint = on
      eigvfunscale = maximum
      eigvfunscaleparam = 1.42E-6
      dDef: Direct

Datasets
  dset1: Solution | solution = sol1